// SBML level 3 version 1

model adlung1()

  // Compartments:
  compartment cyt = 1;

  // Species:
  species AkttBaF3 in cyt = initAkttBaF3;
  species BaF3Epo in cyt = 0.002;
  species EpoRBaF3 in cyt = 0.01862;
  species ErktBaF3 in cyt = initErktBaF3;
  species GTPRas in cyt = initRastBaF3*kbackRas/(kbackRas + kdRas);
  species IntpS6 in cyt = 0;
  species Intpakt in cyt = 0;
  species Intperk in cyt = 0;
  species MektBaF3 in cyt = initMektBaF3;
  species PDK1tBaF3 in cyt = initPDK1tBaF3;
  species PI3KtBaF3 in cyt = initPI3KtBaF3;
  species PI45P2BaF3 in cyt = initPI45P2BaF3;
  species PIP3 in cyt = -(initPI45P2BaF3*vPIP3basal*(0 - initPI3KtBaF3 + 0))/(initPTENBaF3*vPI45P2 + kshbasal*(initSHIP1tBaF3 - initRpSHIP1));
  species PIP3Akt in cyt = dpAkt*(-(initPI45P2BaF3*vPIP3basal*(0 - initPI3KtBaF3 + 0))/(initPTENBaF3*vPI45P2 + kshbasal*(initSHIP1tBaF3 - initRpSHIP1)))*initAkttBaF3*kAkt/(dpAkt*lAkt + dpAkt*(-(initPI45P2BaF3*vPIP3basal*(0 - initPI3KtBaF3 + 0))/(initPTENBaF3*vPI45P2 + kshbasal*(initSHIP1tBaF3 - initRpSHIP1)))*kAkt + dpAkt*(-(initPI45P2BaF3*vPIP3basal*(0 - initPI3KtBaF3 + 0))/(initPTENBaF3*vPI45P2 + kshbasal*(initSHIP1tBaF3 - initRpSHIP1))*initPDK1tBaF3*kPDK1/(lPDK1 + (-(initPI45P2BaF3*vPIP3basal*(0 - initPI3KtBaF3 + 0))/(initPTENBaF3*vPI45P2 + kshbasal*(initSHIP1tBaF3 - initRpSHIP1))*kPDK1)))*vpAkt + (-(initPI45P2BaF3*vPIP3basal*(0 - initPI3KtBaF3 + 0))/(initPTENBaF3*vPI45P2 + kshbasal*(initSHIP1tBaF3 - initRpSHIP1))*(-(initPI45P2BaF3*vPIP3basal*(0 - initPI3KtBaF3 + 0))/(initPTENBaF3*vPI45P2 + kshbasal*(initSHIP1tBaF3 - initRpSHIP1))*initPDK1tBaF3*kPDK1/(lPDK1 + (-(initPI45P2BaF3*vPIP3basal*(0 - initPI3KtBaF3 + 0))/(initPTENBaF3*vPI45P2 + kshbasal*(initSHIP1tBaF3 - initRpSHIP1))*kPDK1)))*kAkt*vpAkt));
  species PIP3PDK1 in cyt = -(initPI45P2BaF3*vPIP3basal*(0 - initPI3KtBaF3 + 0))/(initPTENBaF3*vPI45P2 + kshbasal*(initSHIP1tBaF3 - initRpSHIP1))*initPDK1tBaF3*kPDK1/(lPDK1 + (-(initPI45P2BaF3*vPIP3basal*(0 - initPI3KtBaF3 + 0))/(initPTENBaF3*vPI45P2 + kshbasal*(initSHIP1tBaF3 - initRpSHIP1))*kPDK1));
  species PTENBaF3 in cyt = initPTENBaF3;
  species PhosphatasetBaF3 in cyt = 0.0415;
  species Proliferation in cyt = 0;
  species RSKa in cyt = -(0.5*(kdphoss6 + initTORC1*kas6t - 1*((RSKin*kinrskb + 1)*(Mekin*kmekinb + 1)*(kdphoss6^2 + initTORC1^2*kas6t^2 + 2*initTORC1*kas6t*kdphoss6 + RSKin*kdphoss6^2*kinrskb + Mekin*kdphoss6^2*kmekinb + 4*initRSKtb*(initErktBaF3*(initRaftBaF3*(initRastBaF3*kbackRas/(kbackRas + kdRas))*kpRaf/(kpRaf + lpRaf)*(initRaftBaF3*(initRastBaF3*kbackRas/(kbackRas + kdRas))*kpRaf/(kpRaf + lpRaf)*initMektBaF3*kpMek/(kpMek*kppMek*(initRaftBaF3*(initRastBaF3*kbackRas/(kbackRas + kdRas))*kpRaf/(kpRaf + lpRaf))^2/lppMek + kpMek*(initRaftBaF3*(initRastBaF3*kbackRas/(kbackRas + kdRas))*kpRaf/(kpRaf + lpRaf)) + lpMek))*kppMek/lppMek)*kpErk/(kpErk*kppErk*(initRaftBaF3*(initRastBaF3*kbackRas/(kbackRas + kdRas))*kpRaf/(kpRaf + lpRaf)*(initRaftBaF3*(initRastBaF3*kbackRas/(kbackRas + kdRas))*kpRaf/(kpRaf + lpRaf)*initMektBaF3*kpMek/(kpMek*kppMek*(initRaftBaF3*(initRastBaF3*kbackRas/(kbackRas + kdRas))*kpRaf/(kpRaf + lpRaf))^2/lppMek + kpMek*(initRaftBaF3*(initRastBaF3*kbackRas/(kbackRas + kdRas))*kpRaf/(kpRaf + lpRaf)) + lpMek))*kppMek/lppMek)^2/(bDUSP3*lppErk) + kpErk*(initRaftBaF3*(initRastBaF3*kbackRas/(kbackRas + kdRas))*kpRaf/(kpRaf + lpRaf)*(initRaftBaF3*(initRastBaF3*kbackRas/(kbackRas + kdRas))*kpRaf/(kpRaf + lpRaf)*initMektBaF3*kpMek/(kpMek*kppMek*(initRaftBaF3*(initRastBaF3*kbackRas/(kbackRas + kdRas))*kpRaf/(kpRaf + lpRaf))^2/lppMek + kpMek*(initRaftBaF3*(initRastBaF3*kbackRas/(kbackRas + kdRas))*kpRaf/(kpRaf + lpRaf)) + lpMek))*kppMek/lppMek) + bDUSP3*lpErk)*(initRaftBaF3*(initRastBaF3*kbackRas/(kbackRas + kdRas))*kpRaf/(kpRaf + lpRaf)*(initRaftBaF3*(initRastBaF3*kbackRas/(kbackRas + kdRas))*kpRaf/(kpRaf + lpRaf)*initMektBaF3*kpMek/(kpMek*kppMek*(initRaftBaF3*(initRastBaF3*kbackRas/(kbackRas + kdRas))*kpRaf/(kpRaf + lpRaf))^2/lppMek + kpMek*(initRaftBaF3*(initRastBaF3*kbackRas/(kbackRas + kdRas))*kpRaf/(kpRaf + lpRaf)) + lpMek))*kppMek/lppMek)*kppErk/(bDUSP3*lppErk))*karsk*kas6r + initTORC1^2*RSKin*kas6t^2*kinrskb + initTORC1^2*Mekin*kas6t^2*kmekinb + 2*initTORC1*RSKin*kas6t*kdphoss6*kinrskb + 2*initTORC1*Mekin*kas6t*kdphoss6*kmekinb + RSKin*Mekin*kdphoss6^2*kinrskb*kmekinb + initTORC1^2*RSKin*Mekin*kas6t^2*kinrskb*kmekinb + 2*initTORC1*RSKin*Mekin*kas6t*kdphoss6*kinrskb*kmekinb))^(1/2) + RSKin*kdphoss6*kinrskb + Mekin*kdphoss6*kmekinb + initTORC1*RSKin*kas6t*kinrskb + initTORC1*Mekin*kas6t*kmekinb + RSKin*Mekin*kdphoss6*kinrskb*kmekinb + initTORC1*RSKin*Mekin*kas6t*kinrskb*kmekinb))/(kas6r*(RSKin*kinrskb + 1)*(Mekin*kmekinb + 1));
  species RSKtb in cyt = initRSKtb;
  species RaftBaF3 in cyt = initRaftBaF3;
  species Raptorb in cyt = 0.1;
  species RastBaF3 in cyt = initRastBaF3;
  species Rictorb in cyt = 1.2329;
  species RpSHIP1 in cyt = initRpSHIP1;
  species RpSos in cyt = 0;
  species S6tBaF3 in cyt = initS6tBaF3;
  species SHIP1tBaF3 in cyt = initSHIP1tBaF3;
  species TORC1 in cyt = initTORC1;
  species TORC2 in cyt = 0;
  species actPhosphatase in cyt = 0;
  species mTORa in cyt = 0;
  species mTORt in cyt = 0.1;
  species pAkt in cyt = -(initPI45P2BaF3*vPIP3basal*(0 - initPI3KtBaF3 + 0))/(initPTENBaF3*vPI45P2 + kshbasal*(initSHIP1tBaF3 - initRpSHIP1))*initAkttBaF3*(-(initPI45P2BaF3*vPIP3basal*(0 - initPI3KtBaF3 + 0))/(initPTENBaF3*vPI45P2 + kshbasal*(initSHIP1tBaF3 - initRpSHIP1))*initPDK1tBaF3*kPDK1/(lPDK1 + (-(initPI45P2BaF3*vPIP3basal*(0 - initPI3KtBaF3 + 0))/(initPTENBaF3*vPI45P2 + kshbasal*(initSHIP1tBaF3 - initRpSHIP1))*kPDK1)))*kAkt*vpAkt/(dpAkt*lAkt + dpAkt*(-(initPI45P2BaF3*vPIP3basal*(0 - initPI3KtBaF3 + 0))/(initPTENBaF3*vPI45P2 + kshbasal*(initSHIP1tBaF3 - initRpSHIP1)))*kAkt + dpAkt*(-(initPI45P2BaF3*vPIP3basal*(0 - initPI3KtBaF3 + 0))/(initPTENBaF3*vPI45P2 + kshbasal*(initSHIP1tBaF3 - initRpSHIP1))*initPDK1tBaF3*kPDK1/(lPDK1 + (-(initPI45P2BaF3*vPIP3basal*(0 - initPI3KtBaF3 + 0))/(initPTENBaF3*vPI45P2 + kshbasal*(initSHIP1tBaF3 - initRpSHIP1))*kPDK1)))*vpAkt + (-(initPI45P2BaF3*vPIP3basal*(0 - initPI3KtBaF3 + 0))/(initPTENBaF3*vPI45P2 + kshbasal*(initSHIP1tBaF3 - initRpSHIP1))*(-(initPI45P2BaF3*vPIP3basal*(0 - initPI3KtBaF3 + 0))/(initPTENBaF3*vPI45P2 + kshbasal*(initSHIP1tBaF3 - initRpSHIP1))*initPDK1tBaF3*kPDK1/(lPDK1 + (-(initPI45P2BaF3*vPIP3basal*(0 - initPI3KtBaF3 + 0))/(initPTENBaF3*vPI45P2 + kshbasal*(initSHIP1tBaF3 - initRpSHIP1))*kPDK1)))*kAkt*vpAkt));
  species pEpoR in cyt = 0;
  species pErk in cyt = initErktBaF3*(initRaftBaF3*(initRastBaF3*kbackRas/(kbackRas + kdRas))*kpRaf/(kpRaf + lpRaf)*(initRaftBaF3*(initRastBaF3*kbackRas/(kbackRas + kdRas))*kpRaf/(kpRaf + lpRaf)*initMektBaF3*kpMek/(kpMek*kppMek*(initRaftBaF3*(initRastBaF3*kbackRas/(kbackRas + kdRas))*kpRaf/(kpRaf + lpRaf))^2/lppMek + kpMek*(initRaftBaF3*(initRastBaF3*kbackRas/(kbackRas + kdRas))*kpRaf/(kpRaf + lpRaf)) + lpMek))*kppMek/lppMek)*kpErk/(kpErk*kppErk*(initRaftBaF3*(initRastBaF3*kbackRas/(kbackRas + kdRas))*kpRaf/(kpRaf + lpRaf)*(initRaftBaF3*(initRastBaF3*kbackRas/(kbackRas + kdRas))*kpRaf/(kpRaf + lpRaf)*initMektBaF3*kpMek/(kpMek*kppMek*(initRaftBaF3*(initRastBaF3*kbackRas/(kbackRas + kdRas))*kpRaf/(kpRaf + lpRaf))^2/lppMek + kpMek*(initRaftBaF3*(initRastBaF3*kbackRas/(kbackRas + kdRas))*kpRaf/(kpRaf + lpRaf)) + lpMek))*kppMek/lppMek)^2/(bDUSP3*lppErk) + kpErk*(initRaftBaF3*(initRastBaF3*kbackRas/(kbackRas + kdRas))*kpRaf/(kpRaf + lpRaf)*(initRaftBaF3*(initRastBaF3*kbackRas/(kbackRas + kdRas))*kpRaf/(kpRaf + lpRaf)*initMektBaF3*kpMek/(kpMek*kppMek*(initRaftBaF3*(initRastBaF3*kbackRas/(kbackRas + kdRas))*kpRaf/(kpRaf + lpRaf))^2/lppMek + kpMek*(initRaftBaF3*(initRastBaF3*kbackRas/(kbackRas + kdRas))*kpRaf/(kpRaf + lpRaf)) + lpMek))*kppMek/lppMek) + bDUSP3*lpErk);
  species pMek in cyt = initRaftBaF3*(initRastBaF3*kbackRas/(kbackRas + kdRas))*kpRaf/(kpRaf + lpRaf)*initMektBaF3*kpMek/(kpMek*kppMek*(initRaftBaF3*(initRastBaF3*kbackRas/(kbackRas + kdRas))*kpRaf/(kpRaf + lpRaf))^2/lppMek + kpMek*(initRaftBaF3*(initRastBaF3*kbackRas/(kbackRas + kdRas))*kpRaf/(kpRaf + lpRaf)) + lpMek);
  species pRaf in cyt = initRaftBaF3*(initRastBaF3*kbackRas/(kbackRas + kdRas))*kpRaf/(kpRaf + lpRaf);
  species pS6 in cyt = initS6tBaF3*(kbacks6 + initTORC1*kas6t + (-(0.5*(kdphoss6 + initTORC1*kas6t - 1*((RSKin*kinrskb + 1)*(Mekin*kmekinb + 1)*(kdphoss6^2 + initTORC1^2*kas6t^2 + 2*initTORC1*kas6t*kdphoss6 + RSKin*kdphoss6^2*kinrskb + Mekin*kdphoss6^2*kmekinb + 4*initRSKtb*(initErktBaF3*(initRaftBaF3*(initRastBaF3*kbackRas/(kbackRas + kdRas))*kpRaf/(kpRaf + lpRaf)*(initRaftBaF3*(initRastBaF3*kbackRas/(kbackRas + kdRas))*kpRaf/(kpRaf + lpRaf)*initMektBaF3*kpMek/(kpMek*kppMek*(initRaftBaF3*(initRastBaF3*kbackRas/(kbackRas + kdRas))*kpRaf/(kpRaf + lpRaf))^2/lppMek + kpMek*(initRaftBaF3*(initRastBaF3*kbackRas/(kbackRas + kdRas))*kpRaf/(kpRaf + lpRaf)) + lpMek))*kppMek/lppMek)*kpErk/(kpErk*kppErk*(initRaftBaF3*(initRastBaF3*kbackRas/(kbackRas + kdRas))*kpRaf/(kpRaf + lpRaf)*(initRaftBaF3*(initRastBaF3*kbackRas/(kbackRas + kdRas))*kpRaf/(kpRaf + lpRaf)*initMektBaF3*kpMek/(kpMek*kppMek*(initRaftBaF3*(initRastBaF3*kbackRas/(kbackRas + kdRas))*kpRaf/(kpRaf + lpRaf))^2/lppMek + kpMek*(initRaftBaF3*(initRastBaF3*kbackRas/(kbackRas + kdRas))*kpRaf/(kpRaf + lpRaf)) + lpMek))*kppMek/lppMek)^2/(bDUSP3*lppErk) + kpErk*(initRaftBaF3*(initRastBaF3*kbackRas/(kbackRas + kdRas))*kpRaf/(kpRaf + lpRaf)*(initRaftBaF3*(initRastBaF3*kbackRas/(kbackRas + kdRas))*kpRaf/(kpRaf + lpRaf)*initMektBaF3*kpMek/(kpMek*kppMek*(initRaftBaF3*(initRastBaF3*kbackRas/(kbackRas + kdRas))*kpRaf/(kpRaf + lpRaf))^2/lppMek + kpMek*(initRaftBaF3*(initRastBaF3*kbackRas/(kbackRas + kdRas))*kpRaf/(kpRaf + lpRaf)) + lpMek))*kppMek/lppMek) + bDUSP3*lpErk)*(initRaftBaF3*(initRastBaF3*kbackRas/(kbackRas + kdRas))*kpRaf/(kpRaf + lpRaf)*(initRaftBaF3*(initRastBaF3*kbackRas/(kbackRas + kdRas))*kpRaf/(kpRaf + lpRaf)*initMektBaF3*kpMek/(kpMek*kppMek*(initRaftBaF3*(initRastBaF3*kbackRas/(kbackRas + kdRas))*kpRaf/(kpRaf + lpRaf))^2/lppMek + kpMek*(initRaftBaF3*(initRastBaF3*kbackRas/(kbackRas + kdRas))*kpRaf/(kpRaf + lpRaf)) + lpMek))*kppMek/lppMek)*kppErk/(bDUSP3*lppErk))*karsk*kas6r + initTORC1^2*RSKin*kas6t^2*kinrskb + initTORC1^2*Mekin*kas6t^2*kmekinb + 2*initTORC1*RSKin*kas6t*kdphoss6*kinrskb + 2*initTORC1*Mekin*kas6t*kdphoss6*kmekinb + RSKin*Mekin*kdphoss6^2*kinrskb*kmekinb + initTORC1^2*RSKin*Mekin*kas6t^2*kinrskb*kmekinb + 2*initTORC1*RSKin*Mekin*kas6t*kdphoss6*kinrskb*kmekinb))^(1/2) + RSKin*kdphoss6*kinrskb + Mekin*kdphoss6*kmekinb + initTORC1*RSKin*kas6t*kinrskb + initTORC1*Mekin*kas6t*kmekinb + RSKin*Mekin*kdphoss6*kinrskb*kmekinb + initTORC1*RSKin*Mekin*kas6t*kinrskb*kmekinb))/(kas6r*(RSKin*kinrskb + 1)*(Mekin*kmekinb + 1))*kas6r))/(kbacks6 + kdphoss6 + initTORC1*kas6t + (-(0.5*(kdphoss6 + initTORC1*kas6t - 1*((RSKin*kinrskb + 1)*(Mekin*kmekinb + 1)*(kdphoss6^2 + initTORC1^2*kas6t^2 + 2*initTORC1*kas6t*kdphoss6 + RSKin*kdphoss6^2*kinrskb + Mekin*kdphoss6^2*kmekinb + 4*initRSKtb*(initErktBaF3*(initRaftBaF3*(initRastBaF3*kbackRas/(kbackRas + kdRas))*kpRaf/(kpRaf + lpRaf)*(initRaftBaF3*(initRastBaF3*kbackRas/(kbackRas + kdRas))*kpRaf/(kpRaf + lpRaf)*initMektBaF3*kpMek/(kpMek*kppMek*(initRaftBaF3*(initRastBaF3*kbackRas/(kbackRas + kdRas))*kpRaf/(kpRaf + lpRaf))^2/lppMek + kpMek*(initRaftBaF3*(initRastBaF3*kbackRas/(kbackRas + kdRas))*kpRaf/(kpRaf + lpRaf)) + lpMek))*kppMek/lppMek)*kpErk/(kpErk*kppErk*(initRaftBaF3*(initRastBaF3*kbackRas/(kbackRas + kdRas))*kpRaf/(kpRaf + lpRaf)*(initRaftBaF3*(initRastBaF3*kbackRas/(kbackRas + kdRas))*kpRaf/(kpRaf + lpRaf)*initMektBaF3*kpMek/(kpMek*kppMek*(initRaftBaF3*(initRastBaF3*kbackRas/(kbackRas + kdRas))*kpRaf/(kpRaf + lpRaf))^2/lppMek + kpMek*(initRaftBaF3*(initRastBaF3*kbackRas/(kbackRas + kdRas))*kpRaf/(kpRaf + lpRaf)) + lpMek))*kppMek/lppMek)^2/(bDUSP3*lppErk) + kpErk*(initRaftBaF3*(initRastBaF3*kbackRas/(kbackRas + kdRas))*kpRaf/(kpRaf + lpRaf)*(initRaftBaF3*(initRastBaF3*kbackRas/(kbackRas + kdRas))*kpRaf/(kpRaf + lpRaf)*initMektBaF3*kpMek/(kpMek*kppMek*(initRaftBaF3*(initRastBaF3*kbackRas/(kbackRas + kdRas))*kpRaf/(kpRaf + lpRaf))^2/lppMek + kpMek*(initRaftBaF3*(initRastBaF3*kbackRas/(kbackRas + kdRas))*kpRaf/(kpRaf + lpRaf)) + lpMek))*kppMek/lppMek) + bDUSP3*lpErk)*(initRaftBaF3*(initRastBaF3*kbackRas/(kbackRas + kdRas))*kpRaf/(kpRaf + lpRaf)*(initRaftBaF3*(initRastBaF3*kbackRas/(kbackRas + kdRas))*kpRaf/(kpRaf + lpRaf)*initMektBaF3*kpMek/(kpMek*kppMek*(initRaftBaF3*(initRastBaF3*kbackRas/(kbackRas + kdRas))*kpRaf/(kpRaf + lpRaf))^2/lppMek + kpMek*(initRaftBaF3*(initRastBaF3*kbackRas/(kbackRas + kdRas))*kpRaf/(kpRaf + lpRaf)) + lpMek))*kppMek/lppMek)*kppErk/(bDUSP3*lppErk))*karsk*kas6r + initTORC1^2*RSKin*kas6t^2*kinrskb + initTORC1^2*Mekin*kas6t^2*kmekinb + 2*initTORC1*RSKin*kas6t*kdphoss6*kinrskb + 2*initTORC1*Mekin*kas6t*kdphoss6*kmekinb + RSKin*Mekin*kdphoss6^2*kinrskb*kmekinb + initTORC1^2*RSKin*Mekin*kas6t^2*kinrskb*kmekinb + 2*initTORC1*RSKin*Mekin*kas6t*kdphoss6*kinrskb*kmekinb))^(1/2) + RSKin*kdphoss6*kinrskb + Mekin*kdphoss6*kmekinb + initTORC1*RSKin*kas6t*kinrskb + initTORC1*Mekin*kas6t*kmekinb + RSKin*Mekin*kdphoss6*kinrskb*kmekinb + initTORC1*RSKin*Mekin*kas6t*kinrskb*kmekinb))/(kas6r*(RSKin*kinrskb + 1)*(Mekin*kmekinb + 1))*kas6r));
  species pS6plot in cyt;
  species pSos in cyt = 0;
  species phos2 in cyt = 0;
  species ppErk in cyt = initErktBaF3*(initRaftBaF3*(initRastBaF3*kbackRas/(kbackRas + kdRas))*kpRaf/(kpRaf + lpRaf)*(initRaftBaF3*(initRastBaF3*kbackRas/(kbackRas + kdRas))*kpRaf/(kpRaf + lpRaf)*initMektBaF3*kpMek/(kpMek*kppMek*(initRaftBaF3*(initRastBaF3*kbackRas/(kbackRas + kdRas))*kpRaf/(kpRaf + lpRaf))^2/lppMek + kpMek*(initRaftBaF3*(initRastBaF3*kbackRas/(kbackRas + kdRas))*kpRaf/(kpRaf + lpRaf)) + lpMek))*kppMek/lppMek)*kpErk/(kpErk*kppErk*(initRaftBaF3*(initRastBaF3*kbackRas/(kbackRas + kdRas))*kpRaf/(kpRaf + lpRaf)*(initRaftBaF3*(initRastBaF3*kbackRas/(kbackRas + kdRas))*kpRaf/(kpRaf + lpRaf)*initMektBaF3*kpMek/(kpMek*kppMek*(initRaftBaF3*(initRastBaF3*kbackRas/(kbackRas + kdRas))*kpRaf/(kpRaf + lpRaf))^2/lppMek + kpMek*(initRaftBaF3*(initRastBaF3*kbackRas/(kbackRas + kdRas))*kpRaf/(kpRaf + lpRaf)) + lpMek))*kppMek/lppMek)^2/(bDUSP3*lppErk) + kpErk*(initRaftBaF3*(initRastBaF3*kbackRas/(kbackRas + kdRas))*kpRaf/(kpRaf + lpRaf)*(initRaftBaF3*(initRastBaF3*kbackRas/(kbackRas + kdRas))*kpRaf/(kpRaf + lpRaf)*initMektBaF3*kpMek/(kpMek*kppMek*(initRaftBaF3*(initRastBaF3*kbackRas/(kbackRas + kdRas))*kpRaf/(kpRaf + lpRaf))^2/lppMek + kpMek*(initRaftBaF3*(initRastBaF3*kbackRas/(kbackRas + kdRas))*kpRaf/(kpRaf + lpRaf)) + lpMek))*kppMek/lppMek) + bDUSP3*lpErk)*(initRaftBaF3*(initRastBaF3*kbackRas/(kbackRas + kdRas))*kpRaf/(kpRaf + lpRaf)*(initRaftBaF3*(initRastBaF3*kbackRas/(kbackRas + kdRas))*kpRaf/(kpRaf + lpRaf)*initMektBaF3*kpMek/(kpMek*kppMek*(initRaftBaF3*(initRastBaF3*kbackRas/(kbackRas + kdRas))*kpRaf/(kpRaf + lpRaf))^2/lppMek + kpMek*(initRaftBaF3*(initRastBaF3*kbackRas/(kbackRas + kdRas))*kpRaf/(kpRaf + lpRaf)) + lpMek))*kppMek/lppMek)*kppErk/(bDUSP3*lppErk);
  species ppMek in cyt = initRaftBaF3*(initRastBaF3*kbackRas/(kbackRas + kdRas))*kpRaf/(kpRaf + lpRaf)*(initRaftBaF3*(initRastBaF3*kbackRas/(kbackRas + kdRas))*kpRaf/(kpRaf + lpRaf)*initMektBaF3*kpMek/(kpMek*kppMek*(initRaftBaF3*(initRastBaF3*kbackRas/(kbackRas + kdRas))*kpRaf/(kpRaf + lpRaf))^2/lppMek + kpMek*(initRaftBaF3*(initRastBaF3*kbackRas/(kbackRas + kdRas))*kpRaf/(kpRaf + lpRaf)) + lpMek))*kppMek/lppMek;

  // Parameters:
  Aktin = 0;
  EpoRactivation1 = 0.140964;
  Epodegradation = 0.0173287;
  Ji1 = 0.220505;
  Ki1 = 0.0272784;
  Mekin = 0;
  Phosact1 = 341.317;
  Phosdeact1 = 1e-5;
  Phosphataseactivation1 = 144.425;
  Phosphatasedeactivation1 = 1e-5;
  RSKin = 0;
  Rapamycin = 0;
  Sostb = 4.46181e-5;
  bDUSP3 = 96.7699;
  cycleaktinb = 0.967522;
  cyclemekinb = 0.127989;
  dpAkt = 3.4739;
  initAkttBaF3 = 0.51;
  initErktBaF3 = 2.964;
  initMektBaF3 = 4.38;
  initPDK1tBaF3 = 0.763;
  initPI3KtBaF3 = 0.0124;
  initPI45P2BaF3 = 10;
  initPTENBaF3 = 0.1074;
  initRSKtb = 3.0306;
  initRaftBaF3 = 3.886;
  initRastBaF3 = 9.531;
  initRpSHIP1 = 0;
  initS6tBaF3 = 2.59;
  initSHIP1tBaF3 = 0.0842;
  initTORC1 = 0;
  kAkt = 9984.96;
  kPDK1 = 9439.5;
  kPI3K = 0.000104741;
  kPI3Kras = 10000;
  kSHIP1 = 0.0745937;
  kSos = 59.4049;
  kaRas = 2981.53;
  kaktinb = 1.866219;
  karsk = 1.26435;
  kas6r = 0.000533083;
  kas6t = 2180.44;
  kbackRas = 0.0103384;
  kbacks6 = 1.00003e-5;
  kdRas = 0.540777;
  kdactm = 0.0617342;
  kdpes = 0.0270729;
  kdphoss6 = 0.328006;
  kdrsk = 0.677229;
  kdt1 = 1588.13;
  kdt2 = 1e-5;
  kinrapab = 2.778902;
  kinrskb = 0.552054462;
  kmekinb = 3.224998;
  kpErk = 9999.08;
  kpMek = 9774.26;
  kpRaf = 1.17959;
  kpes = 0.583255;
  kppErk = 9999.96;
  kppMek = 9999.77;
  ksatb = 0.0024577;
  kshbasal = 1e-5;
  kst1 = 20.0908;
  kst2 = 0.0619403;
  kvpakt = 0.000174996;
  kvppErk = 0.000282332;
  lAkt = 10.1007;
  lPDK1 = 2355.54;
  lSHIP1 = 0.000650697;
  lSos = 0.39616;
  lpErk = 177.216;
  lpMek = 0.0414313;
  lpRaf = 2549.69;
  lppErk = 3.2516;
  lppMek = 1336.21;
  main1 = 0.000224787;
  maxccb = 0.99;
  n1 = 4;
  nb = 2.03939;
  pEpoRdeactivation1 = 3.20488;
  pbk2correct = 0.485791;
  pboffcorrect = 0.470245;
  vPI34P2 = 9996.96;
  vPI45P2 = 84.5564;
  vPIP3 = 10000;
  vPIP3basal = 0.104429;
  vpAkt = 6.90774;

  // Assignment rules:
  pS6plot := 412.8573*pS6;

  // Reactions:
  v1: BaF3Epo -> ; Epodegradation*BaF3Epo;
  v18: -> RpSHIP1; kSHIP1*(SHIP1tBaF3 - RpSHIP1)*(pEpoR - RpSHIP1);  // modifiers: pEpoR, SHIP1tBaF3
  v19: RpSHIP1 -> ; lSHIP1*RpSHIP1;
  v2: -> pEpoR; EpoRactivation1/(1 + phos2/Ki1)*(EpoRBaF3 - pEpoR*(1 + kPI3K/((1 + kPI3K)*1 + kPI3K*kPI3Kras*1) + kPI3K*kPI3Kras/((1 + kPI3K)*1 + kPI3K*kPI3Kras*1)))*(BaF3Epo^nb/(ksatb^nb + BaF3Epo^nb));  // modifiers: BaF3Epo, EpoRBaF3, phos2
  v20: -> PIP3; vPIP3*PI45P2BaF3*kPI3K/((1 + kPI3K)*1 + kPI3K*kPI3Kras*1)*pEpoR;  // modifiers: pEpoR, PI45P2BaF3
  v21: -> PIP3; vPIP3*main1*PI45P2BaF3*kPI3K*kPI3Kras/((1 + kPI3K)*1 + kPI3K*kPI3Kras*1)*pEpoR;  // modifiers: pEpoR, PI45P2BaF3
  v22: PIP3 -> ; kshbasal*PIP3*(SHIP1tBaF3 - RpSHIP1);  // modifiers: SHIP1tBaF3, RpSHIP1
  v23: PIP3 -> ; vPI45P2*PIP3*PTENBaF3;  // modifiers: PTENBaF3
  v24: PIP3 -> ; vPI34P2*PIP3*RpSHIP1;  // modifiers: RpSHIP1
  v25: PIP3 -> PIP3PDK1; kPDK1*PIP3*(PDK1tBaF3 - PIP3PDK1);  // modifiers: PDK1tBaF3
  v26: PIP3PDK1 -> PIP3; lPDK1*PIP3PDK1;
  v27: PIP3 -> PIP3Akt; kAkt*PIP3*(AkttBaF3 - PIP3Akt - pAkt);  // modifiers: pAkt, AkttBaF3
  v28: PIP3Akt -> PIP3; lAkt*PIP3Akt;
  v29: PIP3Akt -> ; vpAkt*PIP3Akt*PIP3PDK1;  // modifiers: PIP3PDK1
  v3: -> actPhosphatase; Phosphataseactivation1*(PhosphatasetBaF3 - actPhosphatase)*pEpoR;  // modifiers: pEpoR, PhosphatasetBaF3
  v30: -> PIP3; vpAkt*PIP3Akt*PIP3PDK1;  // modifiers: PIP3PDK1, PIP3Akt
  v31: -> pAkt; vpAkt*PIP3Akt*PIP3PDK1/(1 + kaktinb*Aktin);  // modifiers: PIP3PDK1, PIP3Akt
  v32: pAkt -> ; dpAkt*pAkt;
  v33: -> PIP3; vPIP3basal*PI45P2BaF3*(PI3KtBaF3 - kPI3K/((1 + kPI3K)*1 + kPI3K*kPI3Kras*1)*pEpoR - kPI3K*kPI3Kras/((1 + kPI3K)*1 + kPI3K*kPI3Kras*1)*pEpoR);  // modifiers: pEpoR, PI45P2BaF3, PI3KtBaF3
  v34: -> PIP3; vPIP3basal*main1*PI45P2BaF3;  // modifiers: PI45P2BaF3
  v35: -> pSos; kpes*(Sostb - pSos - RpSos)*ppErk;  // modifiers: ppErk, RpSos
  v36: pSos -> ; kdpes*pSos;
  v37: -> RpSos; kSos*(Sostb - RpSos - pSos)*(pEpoR - RpSos);  // modifiers: pEpoR, pSos
  v38: RpSos -> ; lSos*RpSos;
  v39: RpSos -> pSos; kpes*RpSos*ppErk;  // modifiers: ppErk
  v4: actPhosphatase -> ; Phosphatasedeactivation1*actPhosphatase;
  v40: -> GTPRas; kbackRas*(RastBaF3 - GTPRas - kPI3K*kPI3Kras/((1 + kPI3K)*1 + kPI3K*kPI3Kras*1)*pEpoR);  // modifiers: pEpoR, RastBaF3
  v41: -> GTPRas; kaRas*RpSos*(RastBaF3 - GTPRas - kPI3K*kPI3Kras/((1 + kPI3K)*1 + kPI3K*kPI3Kras*1)*pEpoR);  // modifiers: pEpoR, RastBaF3, RpSos
  v42: GTPRas -> ; kdRas*GTPRas;
  v43: -> pRaf; kpRaf*(GTPRas + kPI3K*kPI3Kras/((1 + kPI3K)*1 + kPI3K*kPI3Kras*1)*pEpoR)*(RaftBaF3 - pRaf);  // modifiers: pEpoR, RaftBaF3, GTPRas
  v44: pRaf -> ; lpRaf*pRaf;
  v45: -> pMek; kpMek*pRaf*(MektBaF3 - pMek - ppMek);  // modifiers: ppMek, MektBaF3, pRaf
  v46: pMek -> ; lpMek*pMek;
  v47: pMek -> ppMek; kppMek*pRaf*pMek;  // modifiers: pRaf
  v48: ppMek -> pMek; lppMek*ppMek;
  v49: -> pErk; kpErk*ppMek*(ErktBaF3 - pErk - ppErk);  // modifiers: ppMek, ppErk, ErktBaF3
  v5: pEpoR -> ; pEpoRdeactivation1*pEpoR*actPhosphatase;  // modifiers: actPhosphatase
  v50: pErk -> ; lpErk*bDUSP3*pErk;
  v51: pErk -> ppErk; kppErk*ppMek*pErk/(1 + kmekinb*Mekin);  // modifiers: ppMek
  v52: ppErk -> pErk; lppErk*bDUSP3*ppErk;
  v53: -> Intperk; ppErk;  // modifiers: ppErk
  v54: -> Intpakt; pAkt;  // modifiers: pAkt
  v55: -> mTORa; kvpakt*pAkt*(mTORt - mTORa - TORC1 - TORC2);  // modifiers: TORC2, TORC1, mTORt, pAkt
  v56: -> mTORa; kvppErk*RSKa/(1 + kinrskb*RSKin)*(mTORt - mTORa - TORC1 - TORC2);  // modifiers: TORC2, TORC1, mTORt, RSKa
  v57: mTORa -> ; kdactm*mTORa;
  v58: mTORa -> TORC1; kst1/(1 + kinrapab*Rapamycin)*(mTORa - TORC1 - TORC2)*(Raptorb - TORC1);  // modifiers: Raptorb, TORC2
  v59: TORC1 -> mTORa; kdt1*TORC1;
  v6: -> phos2; Phosact1*pEpoR^n1/(Ji1^n1 + pEpoR^n1);  // modifiers: pEpoR
  v60: TORC1 -> ; kdactm*TORC1;
  v61: mTORa -> TORC2; kst2*(mTORa - TORC2 - TORC1)*(Rictorb - TORC2);  // modifiers: Rictorb, TORC1
  v62: TORC2 -> mTORa; kdt2*TORC2;
  v63: TORC2 -> ; kdactm*TORC2;
  v64: -> RSKa; karsk/(1 + kinrskb*RSKin)*(RSKtb - RSKa)*ppErk;  // modifiers: ppErk, RSKtb
  v65: RSKa -> ; kdrsk*RSKa;
  v66: -> pS6; kas6t*TORC1*(S6tBaF3 - pS6);  // modifiers: S6tBaF3, TORC1
  v67: -> pS6; kas6r*RSKa*(S6tBaF3 - pS6);  // modifiers: S6tBaF3, RSKa
  v68: -> pS6; kbacks6*(S6tBaF3 - pS6);  // modifiers: S6tBaF3
  v69: pS6 -> ; kdphoss6*pS6;
  v7: phos2 -> ; Phosdeact1*phos2;
  v71: -> IntpS6; pS6;  // modifiers: pS6
  v73: -> Proliferation; pbk2correct*((cycleaktinb*pAkt + cyclemekinb*ppErk)/maxccb) + pboffcorrect/60;  // modifiers: ppErk, pAkt
end
