// SBML level 3 version 1

model adlung2()

  // Compartments:
  compartment cyt = 1;

  // Species:
  species AkttCFUE in cyt = initAkttCFUE;
  species Epo in cyt = 0.002;
  species EpoRCFUE in cyt = 0.00416;
  species ErktCFUE in cyt = initErktCFUE;
  species GTPRas in cyt = initRastCFUE*kbackRas/(kbackRas + kdRas);
  species IntpS6 in cyt = 0;
  species Intpakt in cyt = 0;
  species Intperk in cyt = 0;
  species MektCFUE in cyt = initMektCFUE;
  species PDK1tCFUE in cyt = initPDK1tCFUE;
  species PI3KtCFUE in cyt = initPI3KtCFUE;
  species PI45P2CFUE in cyt = initPI45P2CFUE;
  species PIP3 in cyt = -(initPI45P2CFUE*vPIP3basal*(0 - initPI3KtCFUE + 0))/(initPTENCFUE*vPI45P2 + kshbasal*(initSHIP1tCFUE - initRpSHIP1));
  species PIP3Akt in cyt = dpAkt*(-(initPI45P2CFUE*vPIP3basal*(0 - initPI3KtCFUE + 0))/(initPTENCFUE*vPI45P2 + kshbasal*(initSHIP1tCFUE - initRpSHIP1)))*initAkttCFUE*kAkt/(dpAkt*lAkt + dpAkt*(-(initPI45P2CFUE*vPIP3basal*(0 - initPI3KtCFUE + 0))/(initPTENCFUE*vPI45P2 + kshbasal*(initSHIP1tCFUE - initRpSHIP1)))*kAkt + dpAkt*(-(initPI45P2CFUE*vPIP3basal*(0 - initPI3KtCFUE + 0))/(initPTENCFUE*vPI45P2 + kshbasal*(initSHIP1tCFUE - initRpSHIP1))*initPDK1tCFUE*kPDK1/(lPDK1 + (-(initPI45P2CFUE*vPIP3basal*(0 - initPI3KtCFUE + 0))/(initPTENCFUE*vPI45P2 + kshbasal*(initSHIP1tCFUE - initRpSHIP1))*kPDK1)))*vpAkt + (-(initPI45P2CFUE*vPIP3basal*(0 - initPI3KtCFUE + 0))/(initPTENCFUE*vPI45P2 + kshbasal*(initSHIP1tCFUE - initRpSHIP1))*(-(initPI45P2CFUE*vPIP3basal*(0 - initPI3KtCFUE + 0))/(initPTENCFUE*vPI45P2 + kshbasal*(initSHIP1tCFUE - initRpSHIP1))*initPDK1tCFUE*kPDK1/(lPDK1 + (-(initPI45P2CFUE*vPIP3basal*(0 - initPI3KtCFUE + 0))/(initPTENCFUE*vPI45P2 + kshbasal*(initSHIP1tCFUE - initRpSHIP1))*kPDK1)))*kAkt*vpAkt));
  species PIP3PDK1 in cyt = -(initPI45P2CFUE*vPIP3basal*(0 - initPI3KtCFUE + 0))/(initPTENCFUE*vPI45P2 + kshbasal*(initSHIP1tCFUE - initRpSHIP1))*initPDK1tCFUE*kPDK1/(lPDK1 + (-(initPI45P2CFUE*vPIP3basal*(0 - initPI3KtCFUE + 0))/(initPTENCFUE*vPI45P2 + kshbasal*(initSHIP1tCFUE - initRpSHIP1))*kPDK1));
  species PTENCFUE in cyt = initPTENCFUE;
  species PhosphatasetCFUE in cyt = 0.0415;
  species Proliferation in cyt = 0;
  species RSKa in cyt = -(0.5*(kdphoss6 + initTORC1*kas6t - 1*((RSKin*kinrskc + 1)*(Mekin*kmekinc + 1)*(kdphoss6^2 + initTORC1^2*kas6t^2 + 2*initTORC1*kas6t*kdphoss6 + RSKin*kdphoss6^2*kinrskc + Mekin*kdphoss6^2*kmekinc + 4*initRSKtc*(initErktCFUE*(initRaftCFUE*initRastCFUE*kbackRas/(kbackRas + kdRas)*kpRaf/(kpRaf + lpRaf)*(initRaftCFUE*initRastCFUE*kbackRas/(kbackRas + kdRas)*kpRaf/(kpRaf + lpRaf)*initMektCFUE*kpMek/(kpMek*kppMek*(initRaftCFUE*initRastCFUE*kbackRas/(kbackRas + kdRas)*kpRaf/(kpRaf + lpRaf))^2/lppMek + kpMek*(initRaftCFUE*initRastCFUE*kbackRas/(kbackRas + kdRas)*kpRaf/(kpRaf + lpRaf)) + lpMek))*kppMek/lppMek)*kpErk/(kpErk*kppErk*(initRaftCFUE*initRastCFUE*kbackRas/(kbackRas + kdRas)*kpRaf/(kpRaf + lpRaf)*(initRaftCFUE*initRastCFUE*kbackRas/(kbackRas + kdRas)*kpRaf/(kpRaf + lpRaf)*initMektCFUE*kpMek/(kpMek*kppMek*(initRaftCFUE*initRastCFUE*kbackRas/(kbackRas + kdRas)*kpRaf/(kpRaf + lpRaf))^2/lppMek + kpMek*(initRaftCFUE*initRastCFUE*kbackRas/(kbackRas + kdRas)*kpRaf/(kpRaf + lpRaf)) + lpMek))*kppMek/lppMek)^2/(cDUSP3*lppErk) + kpErk*(initRaftCFUE*initRastCFUE*kbackRas/(kbackRas + kdRas)*kpRaf/(kpRaf + lpRaf)*(initRaftCFUE*initRastCFUE*kbackRas/(kbackRas + kdRas)*kpRaf/(kpRaf + lpRaf)*initMektCFUE*kpMek/(kpMek*kppMek*(initRaftCFUE*initRastCFUE*kbackRas/(kbackRas + kdRas)*kpRaf/(kpRaf + lpRaf))^2/lppMek + kpMek*(initRaftCFUE*initRastCFUE*kbackRas/(kbackRas + kdRas)*kpRaf/(kpRaf + lpRaf)) + lpMek))*kppMek/lppMek) + cDUSP3*lpErk)*(initRaftCFUE*initRastCFUE*kbackRas/(kbackRas + kdRas)*kpRaf/(kpRaf + lpRaf)*(initRaftCFUE*initRastCFUE*kbackRas/(kbackRas + kdRas)*kpRaf/(kpRaf + lpRaf)*initMektCFUE*kpMek/(kpMek*kppMek*(initRaftCFUE*initRastCFUE*kbackRas/(kbackRas + kdRas)*kpRaf/(kpRaf + lpRaf))^2/lppMek + kpMek*(initRaftCFUE*initRastCFUE*kbackRas/(kbackRas + kdRas)*kpRaf/(kpRaf + lpRaf)) + lpMek))*kppMek/lppMek)*kppErk/(cDUSP3*lppErk))*karsk*kas6r + initTORC1^2*RSKin*kas6t^2*kinrskc + initTORC1^2*Mekin*kas6t^2*kmekinc + 2*initTORC1*RSKin*kas6t*kdphoss6*kinrskc + 2*initTORC1*Mekin*kas6t*kdphoss6*kmekinc + RSKin*Mekin*kdphoss6^2*kinrskc*kmekinc + initTORC1^2*RSKin*Mekin*kas6t^2*kinrskc*kmekinc + 2*initTORC1*RSKin*Mekin*kas6t*kdphoss6*kinrskc*kmekinc))^(1/2) + RSKin*kdphoss6*kinrskc + Mekin*kdphoss6*kmekinc + initTORC1*RSKin*kas6t*kinrskc + initTORC1*Mekin*kas6t*kmekinc + RSKin*Mekin*kdphoss6*kinrskc*kmekinc + initTORC1*RSKin*Mekin*kas6t*kinrskc*kmekinc))/(kas6r*(RSKin*kinrskc + 1)*(Mekin*kmekinc + 1));
  species RSKtc in cyt = initRSKtc;
  species RaftCFUE in cyt = initRaftCFUE;
  species Raptorc in cyt = 0.1;
  species RastCFUE in cyt = initRastCFUE;
  species Rictorc in cyt = 0.19886;
  species RpSHIP1 in cyt = initRpSHIP1;
  species RpSos in cyt = 0;
  species S6tCFUE in cyt = initS6tCFUE;
  species SHIP1tCFUE in cyt = initSHIP1tCFUE;
  species TORC1 in cyt = initTORC1;
  species TORC2 in cyt = 0;
  species actPhosphatase in cyt = 0;
  species mTORa in cyt = 0;
  species mTORt in cyt = 0.1;
  species pAkt in cyt = -(initPI45P2CFUE*vPIP3basal*(0 - initPI3KtCFUE + 0))/(initPTENCFUE*vPI45P2 + kshbasal*(initSHIP1tCFUE - initRpSHIP1))*initAkttCFUE*(-(initPI45P2CFUE*vPIP3basal*(0 - initPI3KtCFUE + 0))/(initPTENCFUE*vPI45P2 + kshbasal*(initSHIP1tCFUE - initRpSHIP1))*initPDK1tCFUE*kPDK1/(lPDK1 + (-(initPI45P2CFUE*vPIP3basal*(0 - initPI3KtCFUE + 0))/(initPTENCFUE*vPI45P2 + kshbasal*(initSHIP1tCFUE - initRpSHIP1))*kPDK1)))*kAkt*vpAkt/(dpAkt*lAkt + dpAkt*(-(initPI45P2CFUE*vPIP3basal*(0 - initPI3KtCFUE + 0))/(initPTENCFUE*vPI45P2 + kshbasal*(initSHIP1tCFUE - initRpSHIP1)))*kAkt + dpAkt*(-(initPI45P2CFUE*vPIP3basal*(0 - initPI3KtCFUE + 0))/(initPTENCFUE*vPI45P2 + kshbasal*(initSHIP1tCFUE - initRpSHIP1))*initPDK1tCFUE*kPDK1/(lPDK1 + (-(initPI45P2CFUE*vPIP3basal*(0 - initPI3KtCFUE + 0))/(initPTENCFUE*vPI45P2 + kshbasal*(initSHIP1tCFUE - initRpSHIP1))*kPDK1)))*vpAkt + (-(initPI45P2CFUE*vPIP3basal*(0 - initPI3KtCFUE + 0))/(initPTENCFUE*vPI45P2 + kshbasal*(initSHIP1tCFUE - initRpSHIP1))*(-(initPI45P2CFUE*vPIP3basal*(0 - initPI3KtCFUE + 0))/(initPTENCFUE*vPI45P2 + kshbasal*(initSHIP1tCFUE - initRpSHIP1))*initPDK1tCFUE*kPDK1/(lPDK1 + (-(initPI45P2CFUE*vPIP3basal*(0 - initPI3KtCFUE + 0))/(initPTENCFUE*vPI45P2 + kshbasal*(initSHIP1tCFUE - initRpSHIP1))*kPDK1)))*kAkt*vpAkt));
  species pEpoR in cyt = 0;
  species pErk in cyt = initErktCFUE*(initRaftCFUE*initRastCFUE*kbackRas/(kbackRas + kdRas)*kpRaf/(kpRaf + lpRaf)*(initRaftCFUE*initRastCFUE*kbackRas/(kbackRas + kdRas)*kpRaf/(kpRaf + lpRaf)*initMektCFUE*kpMek/(kpMek*kppMek*(initRaftCFUE*initRastCFUE*kbackRas/(kbackRas + kdRas)*kpRaf/(kpRaf + lpRaf))^2/lppMek + kpMek*(initRaftCFUE*initRastCFUE*kbackRas/(kbackRas + kdRas)*kpRaf/(kpRaf + lpRaf)) + lpMek))*kppMek/lppMek)*kpErk/(kpErk*kppErk*(initRaftCFUE*initRastCFUE*kbackRas/(kbackRas + kdRas)*kpRaf/(kpRaf + lpRaf)*(initRaftCFUE*initRastCFUE*kbackRas/(kbackRas + kdRas)*kpRaf/(kpRaf + lpRaf)*initMektCFUE*kpMek/(kpMek*kppMek*(initRaftCFUE*initRastCFUE*kbackRas/(kbackRas + kdRas)*kpRaf/(kpRaf + lpRaf))^2/lppMek + kpMek*(initRaftCFUE*initRastCFUE*kbackRas/(kbackRas + kdRas)*kpRaf/(kpRaf + lpRaf)) + lpMek))*kppMek/lppMek)^2/(cDUSP3*lppErk) + kpErk*(initRaftCFUE*initRastCFUE*kbackRas/(kbackRas + kdRas)*kpRaf/(kpRaf + lpRaf)*(initRaftCFUE*initRastCFUE*kbackRas/(kbackRas + kdRas)*kpRaf/(kpRaf + lpRaf)*initMektCFUE*kpMek/(kpMek*kppMek*(initRaftCFUE*initRastCFUE*kbackRas/(kbackRas + kdRas)*kpRaf/(kpRaf + lpRaf))^2/lppMek + kpMek*(initRaftCFUE*initRastCFUE*kbackRas/(kbackRas + kdRas)*kpRaf/(kpRaf + lpRaf)) + lpMek))*kppMek/lppMek) + cDUSP3*lpErk);
  species pMek in cyt = initRaftCFUE*initRastCFUE*kbackRas/(kbackRas + kdRas)*kpRaf/(kpRaf + lpRaf)*initMektCFUE*kpMek/(kpMek*kppMek*(initRaftCFUE*initRastCFUE*kbackRas/(kbackRas + kdRas)*kpRaf/(kpRaf + lpRaf))^2/lppMek + kpMek*(initRaftCFUE*initRastCFUE*kbackRas/(kbackRas + kdRas)*kpRaf/(kpRaf + lpRaf)) + lpMek);
  species pRaf in cyt = initRaftCFUE*initRastCFUE*kbackRas/(kbackRas + kdRas)*kpRaf/(kpRaf + lpRaf);
  species pS6 in cyt = initS6tCFUE*(kbacks6 + initTORC1*kas6t + (-(0.5*(kdphoss6 + initTORC1*kas6t - 1*((RSKin*kinrskc + 1)*(Mekin*kmekinc + 1)*(kdphoss6^2 + initTORC1^2*kas6t^2 + 2*initTORC1*kas6t*kdphoss6 + RSKin*kdphoss6^2*kinrskc + Mekin*kdphoss6^2*kmekinc + 4*initRSKtc*(initErktCFUE*(initRaftCFUE*initRastCFUE*kbackRas/(kbackRas + kdRas)*kpRaf/(kpRaf + lpRaf)*(initRaftCFUE*initRastCFUE*kbackRas/(kbackRas + kdRas)*kpRaf/(kpRaf + lpRaf)*initMektCFUE*kpMek/(kpMek*kppMek*(initRaftCFUE*initRastCFUE*kbackRas/(kbackRas + kdRas)*kpRaf/(kpRaf + lpRaf))^2/lppMek + kpMek*(initRaftCFUE*initRastCFUE*kbackRas/(kbackRas + kdRas)*kpRaf/(kpRaf + lpRaf)) + lpMek))*kppMek/lppMek)*kpErk/(kpErk*kppErk*(initRaftCFUE*initRastCFUE*kbackRas/(kbackRas + kdRas)*kpRaf/(kpRaf + lpRaf)*(initRaftCFUE*initRastCFUE*kbackRas/(kbackRas + kdRas)*kpRaf/(kpRaf + lpRaf)*initMektCFUE*kpMek/(kpMek*kppMek*(initRaftCFUE*initRastCFUE*kbackRas/(kbackRas + kdRas)*kpRaf/(kpRaf + lpRaf))^2/lppMek + kpMek*(initRaftCFUE*initRastCFUE*kbackRas/(kbackRas + kdRas)*kpRaf/(kpRaf + lpRaf)) + lpMek))*kppMek/lppMek)^2/(cDUSP3*lppErk) + kpErk*(initRaftCFUE*initRastCFUE*kbackRas/(kbackRas + kdRas)*kpRaf/(kpRaf + lpRaf)*(initRaftCFUE*initRastCFUE*kbackRas/(kbackRas + kdRas)*kpRaf/(kpRaf + lpRaf)*initMektCFUE*kpMek/(kpMek*kppMek*(initRaftCFUE*initRastCFUE*kbackRas/(kbackRas + kdRas)*kpRaf/(kpRaf + lpRaf))^2/lppMek + kpMek*(initRaftCFUE*initRastCFUE*kbackRas/(kbackRas + kdRas)*kpRaf/(kpRaf + lpRaf)) + lpMek))*kppMek/lppMek) + cDUSP3*lpErk)*(initRaftCFUE*initRastCFUE*kbackRas/(kbackRas + kdRas)*kpRaf/(kpRaf + lpRaf)*(initRaftCFUE*initRastCFUE*kbackRas/(kbackRas + kdRas)*kpRaf/(kpRaf + lpRaf)*initMektCFUE*kpMek/(kpMek*kppMek*(initRaftCFUE*initRastCFUE*kbackRas/(kbackRas + kdRas)*kpRaf/(kpRaf + lpRaf))^2/lppMek + kpMek*(initRaftCFUE*initRastCFUE*kbackRas/(kbackRas + kdRas)*kpRaf/(kpRaf + lpRaf)) + lpMek))*kppMek/lppMek)*kppErk/(cDUSP3*lppErk))*karsk*kas6r + initTORC1^2*RSKin*kas6t^2*kinrskc + initTORC1^2*Mekin*kas6t^2*kmekinc + 2*initTORC1*RSKin*kas6t*kdphoss6*kinrskc + 2*initTORC1*Mekin*kas6t*kdphoss6*kmekinc + RSKin*Mekin*kdphoss6^2*kinrskc*kmekinc + initTORC1^2*RSKin*Mekin*kas6t^2*kinrskc*kmekinc + 2*initTORC1*RSKin*Mekin*kas6t*kdphoss6*kinrskc*kmekinc))^(1/2) + RSKin*kdphoss6*kinrskc + Mekin*kdphoss6*kmekinc + initTORC1*RSKin*kas6t*kinrskc + initTORC1*Mekin*kas6t*kmekinc + RSKin*Mekin*kdphoss6*kinrskc*kmekinc + initTORC1*RSKin*Mekin*kas6t*kinrskc*kmekinc))/(kas6r*(RSKin*kinrskc + 1)*(Mekin*kmekinc + 1))*kas6r))/(kbacks6 + kdphoss6 + initTORC1*kas6t + (-(0.5*(kdphoss6 + initTORC1*kas6t - 1*((RSKin*kinrskc + 1)*(Mekin*kmekinc + 1)*(kdphoss6^2 + initTORC1^2*kas6t^2 + 2*initTORC1*kas6t*kdphoss6 + RSKin*kdphoss6^2*kinrskc + Mekin*kdphoss6^2*kmekinc + 4*initRSKtc*(initErktCFUE*(initRaftCFUE*initRastCFUE*kbackRas/(kbackRas + kdRas)*kpRaf/(kpRaf + lpRaf)*(initRaftCFUE*initRastCFUE*kbackRas/(kbackRas + kdRas)*kpRaf/(kpRaf + lpRaf)*initMektCFUE*kpMek/(kpMek*kppMek*(initRaftCFUE*initRastCFUE*kbackRas/(kbackRas + kdRas)*kpRaf/(kpRaf + lpRaf))^2/lppMek + kpMek*(initRaftCFUE*initRastCFUE*kbackRas/(kbackRas + kdRas)*kpRaf/(kpRaf + lpRaf)) + lpMek))*kppMek/lppMek)*kpErk/(kpErk*kppErk*(initRaftCFUE*initRastCFUE*kbackRas/(kbackRas + kdRas)*kpRaf/(kpRaf + lpRaf)*(initRaftCFUE*initRastCFUE*kbackRas/(kbackRas + kdRas)*kpRaf/(kpRaf + lpRaf)*initMektCFUE*kpMek/(kpMek*kppMek*(initRaftCFUE*initRastCFUE*kbackRas/(kbackRas + kdRas)*kpRaf/(kpRaf + lpRaf))^2/lppMek + kpMek*(initRaftCFUE*initRastCFUE*kbackRas/(kbackRas + kdRas)*kpRaf/(kpRaf + lpRaf)) + lpMek))*kppMek/lppMek)^2/(cDUSP3*lppErk) + kpErk*(initRaftCFUE*initRastCFUE*kbackRas/(kbackRas + kdRas)*kpRaf/(kpRaf + lpRaf)*(initRaftCFUE*initRastCFUE*kbackRas/(kbackRas + kdRas)*kpRaf/(kpRaf + lpRaf)*initMektCFUE*kpMek/(kpMek*kppMek*(initRaftCFUE*initRastCFUE*kbackRas/(kbackRas + kdRas)*kpRaf/(kpRaf + lpRaf))^2/lppMek + kpMek*(initRaftCFUE*initRastCFUE*kbackRas/(kbackRas + kdRas)*kpRaf/(kpRaf + lpRaf)) + lpMek))*kppMek/lppMek) + cDUSP3*lpErk)*(initRaftCFUE*initRastCFUE*kbackRas/(kbackRas + kdRas)*kpRaf/(kpRaf + lpRaf)*(initRaftCFUE*initRastCFUE*kbackRas/(kbackRas + kdRas)*kpRaf/(kpRaf + lpRaf)*initMektCFUE*kpMek/(kpMek*kppMek*(initRaftCFUE*initRastCFUE*kbackRas/(kbackRas + kdRas)*kpRaf/(kpRaf + lpRaf))^2/lppMek + kpMek*(initRaftCFUE*initRastCFUE*kbackRas/(kbackRas + kdRas)*kpRaf/(kpRaf + lpRaf)) + lpMek))*kppMek/lppMek)*kppErk/(cDUSP3*lppErk))*karsk*kas6r + initTORC1^2*RSKin*kas6t^2*kinrskc + initTORC1^2*Mekin*kas6t^2*kmekinc + 2*initTORC1*RSKin*kas6t*kdphoss6*kinrskc + 2*initTORC1*Mekin*kas6t*kdphoss6*kmekinc + RSKin*Mekin*kdphoss6^2*kinrskc*kmekinc + initTORC1^2*RSKin*Mekin*kas6t^2*kinrskc*kmekinc + 2*initTORC1*RSKin*Mekin*kas6t*kdphoss6*kinrskc*kmekinc))^(1/2) + RSKin*kdphoss6*kinrskc + Mekin*kdphoss6*kmekinc + initTORC1*RSKin*kas6t*kinrskc + initTORC1*Mekin*kas6t*kmekinc + RSKin*Mekin*kdphoss6*kinrskc*kmekinc + initTORC1*RSKin*Mekin*kas6t*kinrskc*kmekinc))/(kas6r*(RSKin*kinrskc + 1)*(Mekin*kmekinc + 1))*kas6r));
  species pS6plot in cyt;
  species pSos in cyt = 0;
  species phos2 in cyt = 0;
  species ppErk in cyt = initErktCFUE*(initRaftCFUE*initRastCFUE*kbackRas/(kbackRas + kdRas)*kpRaf/(kpRaf + lpRaf)*(initRaftCFUE*initRastCFUE*kbackRas/(kbackRas + kdRas)*kpRaf/(kpRaf + lpRaf)*initMektCFUE*kpMek/(kpMek*kppMek*(initRaftCFUE*initRastCFUE*kbackRas/(kbackRas + kdRas)*kpRaf/(kpRaf + lpRaf))^2/lppMek + kpMek*(initRaftCFUE*initRastCFUE*kbackRas/(kbackRas + kdRas)*kpRaf/(kpRaf + lpRaf)) + lpMek))*kppMek/lppMek)*kpErk/(kpErk*kppErk*(initRaftCFUE*initRastCFUE*kbackRas/(kbackRas + kdRas)*kpRaf/(kpRaf + lpRaf)*(initRaftCFUE*initRastCFUE*kbackRas/(kbackRas + kdRas)*kpRaf/(kpRaf + lpRaf)*initMektCFUE*kpMek/(kpMek*kppMek*(initRaftCFUE*initRastCFUE*kbackRas/(kbackRas + kdRas)*kpRaf/(kpRaf + lpRaf))^2/lppMek + kpMek*(initRaftCFUE*initRastCFUE*kbackRas/(kbackRas + kdRas)*kpRaf/(kpRaf + lpRaf)) + lpMek))*kppMek/lppMek)^2/(cDUSP3*lppErk) + kpErk*(initRaftCFUE*initRastCFUE*kbackRas/(kbackRas + kdRas)*kpRaf/(kpRaf + lpRaf)*(initRaftCFUE*initRastCFUE*kbackRas/(kbackRas + kdRas)*kpRaf/(kpRaf + lpRaf)*initMektCFUE*kpMek/(kpMek*kppMek*(initRaftCFUE*initRastCFUE*kbackRas/(kbackRas + kdRas)*kpRaf/(kpRaf + lpRaf))^2/lppMek + kpMek*(initRaftCFUE*initRastCFUE*kbackRas/(kbackRas + kdRas)*kpRaf/(kpRaf + lpRaf)) + lpMek))*kppMek/lppMek) + cDUSP3*lpErk)*(initRaftCFUE*initRastCFUE*kbackRas/(kbackRas + kdRas)*kpRaf/(kpRaf + lpRaf)*(initRaftCFUE*initRastCFUE*kbackRas/(kbackRas + kdRas)*kpRaf/(kpRaf + lpRaf)*initMektCFUE*kpMek/(kpMek*kppMek*(initRaftCFUE*initRastCFUE*kbackRas/(kbackRas + kdRas)*kpRaf/(kpRaf + lpRaf))^2/lppMek + kpMek*(initRaftCFUE*initRastCFUE*kbackRas/(kbackRas + kdRas)*kpRaf/(kpRaf + lpRaf)) + lpMek))*kppMek/lppMek)*kppErk/(cDUSP3*lppErk);
  species ppMek in cyt = initRaftCFUE*initRastCFUE*kbackRas/(kbackRas + kdRas)*kpRaf/(kpRaf + lpRaf)*(initRaftCFUE*initRastCFUE*kbackRas/(kbackRas + kdRas)*kpRaf/(kpRaf + lpRaf)*initMektCFUE*kpMek/(kpMek*kppMek*(initRaftCFUE*initRastCFUE*kbackRas/(kbackRas + kdRas)*kpRaf/(kpRaf + lpRaf))^2/lppMek + kpMek*(initRaftCFUE*initRastCFUE*kbackRas/(kbackRas + kdRas)*kpRaf/(kpRaf + lpRaf)) + lpMek))*kppMek/lppMek;

  // Parameters:
  Aktin = 0;
  EpoRactivation = 1.17558;
  Ji = 0.000187303;
  Ki = 0.0237162;
  Mekin = 0;
  Phosact = 0.0125808;
  Phosdeact = 1e-5;
  Phosphataseactivation = 77.7544;
  Phosphatasedeactivation = 1e-5;
  RSKin = 0;
  Rapamycin = 0;
  Sostc = 9.74717e-5;
  cDUSP3 = 2.51417;
  dpAkt = 3.4739;
  initAkttCFUE = 0.407;
  initErktCFUE = 1.14;
  initMektCFUE = 1.46;
  initPDK1tCFUE = 0.545;
  initPI3KtCFUE = 0.0127;
  initPI45P2CFUE = 10;
  initPTENCFUE = 0.0104;
  initRSKtc = 0.06888;
  initRaftCFUE = 1.34;
  initRastCFUE = 3.53;
  initRpSHIP1 = 0;
  initS6tCFUE = 5.34;
  initSHIP1tCFUE = 0.0154;
  initTORC1 = 0;
  kAkt = 9984.96;
  kPDK1 = 9439.5;
  kPI3K = 0.000104741;
  kPI3Kras = 10000;
  kSHIP1 = 0.0745937;
  kSos = 59.4049;
  kaRas = 2981.53;
  kaktinc = 3.468236;
  karsk = 1.26435;
  kas6r = 0.000533083;
  kas6t = 2180.44;
  kbackRas = 0.0103384;
  kbacks6 = 1.00003e-5;
  kdRas = 0.540777;
  kdactm = 0.0617342;
  kdpes = 0.0270729;
  kdphoss6 = 0.328006;
  kdrsk = 0.677229;
  kdt1 = 1588.13;
  kdt2 = 1e-5;
  kinrapac = 14.79897;
  kinrskc = 100000;
  kmekinc = 7.041474;
  kpErk = 9999.08;
  kpMek = 9774.26;
  kpRaf = 1.17959;
  kpes = 0.583255;
  kppErk = 9999.96;
  kppMek = 9999.77;
  ksatc = 0.00197959;
  kshbasal = 1e-5;
  kst1 = 20.0908;
  kst2 = 0.0619403;
  kvpakt = 0.000174996;
  kvppErk = 0.000282332;
  lAkt = 10.1007;
  lPDK1 = 2355.54;
  lSHIP1 = 0.000650697;
  lSos = 0.39616;
  lpErk = 177.216;
  lpMek = 0.0414313;
  lpRaf = 2549.69;
  lppErk = 3.2516;
  lppMek = 1336.21;
  main = 0.00837559;
  max6c = 0.0833513;
  n = 4;
  nc = 2.529489;
  pEpoRdeactivation = 2.94539;
  pck1correct = 0.238723;
  pcoffcorrect = 0.741768;
  vPI34P2 = 9996.96;
  vPI45P2 = 84.5564;
  vPIP3 = 10000;
  vPIP3basal = 0.104429;
  vpAkt = 6.90774;

  // Assignment rules:
  pS6plot := 270.9568*pS6;

  // Reactions:
  v1: -> pEpoR; EpoRactivation/(1 + phos2/Ki)*(EpoRCFUE - pEpoR*(1 + kPI3K/((1 + kPI3K)*1 + kPI3K*kPI3Kras*1) + kPI3K*kPI3Kras/((1 + kPI3K)*1 + kPI3K*kPI3Kras*1)))*(Epo^nc/(ksatc^nc + Epo^nc));  // modifiers: Epo, EpoRCFUE, phos2
  v17: -> RpSHIP1; kSHIP1*(SHIP1tCFUE - RpSHIP1)*(pEpoR - RpSHIP1);  // modifiers: SHIP1tCFUE, pEpoR
  v18: RpSHIP1 -> ; lSHIP1*RpSHIP1;
  v19: -> PIP3; vPIP3*PI45P2CFUE*kPI3K/((1 + kPI3K)*1 + kPI3K*kPI3Kras*1)*pEpoR;  // modifiers: pEpoR, PI45P2CFUE
  v2: -> actPhosphatase; Phosphataseactivation*(PhosphatasetCFUE - actPhosphatase)*pEpoR;  // modifiers: pEpoR, PhosphatasetCFUE
  v20: -> PIP3; vPIP3*main*PI45P2CFUE*kPI3K*kPI3Kras/((1 + kPI3K)*1 + kPI3K*kPI3Kras*1)*pEpoR;  // modifiers: pEpoR, PI45P2CFUE
  v21: PIP3 -> ; kshbasal*PIP3*(SHIP1tCFUE - RpSHIP1);  // modifiers: SHIP1tCFUE, RpSHIP1
  v22: PIP3 -> ; vPI45P2*PIP3*PTENCFUE;  // modifiers: PTENCFUE
  v23: PIP3 -> ; vPI34P2*PIP3*RpSHIP1;  // modifiers: RpSHIP1
  v24: PIP3 -> PIP3PDK1; kPDK1*PIP3*(PDK1tCFUE - PIP3PDK1);  // modifiers: PDK1tCFUE
  v25: PIP3PDK1 -> PIP3; lPDK1*PIP3PDK1;
  v26: PIP3 -> PIP3Akt; kAkt*PIP3*(AkttCFUE - PIP3Akt - pAkt);  // modifiers: pAkt, AkttCFUE
  v27: PIP3Akt -> PIP3; lAkt*PIP3Akt;
  v28: PIP3Akt -> ; vpAkt*PIP3Akt*PIP3PDK1;  // modifiers: PIP3PDK1
  v29: -> PIP3; vpAkt*PIP3Akt*PIP3PDK1;  // modifiers: PIP3PDK1, PIP3Akt
  v3: actPhosphatase -> ; Phosphatasedeactivation*actPhosphatase;
  v30: -> pAkt; vpAkt*PIP3Akt*PIP3PDK1/(1 + kaktinc*Aktin);  // modifiers: PIP3PDK1, PIP3Akt
  v31: pAkt -> ; dpAkt*pAkt;
  v32: -> PIP3; vPIP3basal*PI45P2CFUE*(PI3KtCFUE - kPI3K/((1 + kPI3K)*1 + kPI3K*kPI3Kras*1)*pEpoR - kPI3K*kPI3Kras/((1 + kPI3K)*1 + kPI3K*kPI3Kras*1)*pEpoR);  // modifiers: PI3KtCFUE, pEpoR, PI45P2CFUE
  v33: -> PIP3; vPIP3basal*main*PI45P2CFUE;  // modifiers: PI45P2CFUE
  v34: -> pSos; kpes*(Sostc - pSos - RpSos)*ppErk;  // modifiers: ppErk, RpSos
  v35: pSos -> ; kdpes*pSos;
  v36: -> RpSos; kSos*(Sostc - RpSos - pSos)*(pEpoR - RpSos);  // modifiers: pEpoR, pSos
  v37: RpSos -> ; lSos*RpSos;
  v38: RpSos -> pSos; kpes*RpSos*ppErk;  // modifiers: ppErk
  v39: -> GTPRas; kbackRas*(RastCFUE - GTPRas - kPI3K*kPI3Kras/((1 + kPI3K)*1 + kPI3K*kPI3Kras*1)*pEpoR);  // modifiers: pEpoR, RastCFUE
  v4: pEpoR -> ; pEpoRdeactivation*pEpoR*actPhosphatase;  // modifiers: actPhosphatase
  v40: -> GTPRas; kaRas*RpSos*(RastCFUE - GTPRas - kPI3K*kPI3Kras/((1 + kPI3K)*1 + kPI3K*kPI3Kras*1)*pEpoR);  // modifiers: RastCFUE, pEpoR, RpSos
  v41: GTPRas -> ; kdRas*GTPRas;
  v42: -> pRaf; kpRaf*(GTPRas + kPI3K*kPI3Kras/((1 + kPI3K)*1 + kPI3K*kPI3Kras*1)*pEpoR)*(RaftCFUE - pRaf);  // modifiers: RaftCFUE, pEpoR, GTPRas
  v43: pRaf -> ; lpRaf*pRaf;
  v44: -> pMek; kpMek*pRaf*(MektCFUE - pMek - ppMek);  // modifiers: ppMek, MektCFUE, pRaf
  v45: pMek -> ; lpMek*pMek;
  v46: pMek -> ppMek; kppMek*pRaf*pMek;  // modifiers: pRaf
  v47: ppMek -> pMek; lppMek*ppMek;
  v48: -> pErk; kpErk*ppMek*(ErktCFUE - pErk - ppErk);  // modifiers: ppMek, ppErk, ErktCFUE
  v49: pErk -> ; lpErk*cDUSP3*pErk;
  v5: -> phos2; Phosact*pEpoR^n/(Ji^n + pEpoR^n);  // modifiers: pEpoR
  v50: pErk -> ppErk; kppErk*ppMek*pErk/(1 + kmekinc*Mekin);  // modifiers: ppMek
  v51: ppErk -> pErk; lppErk*cDUSP3*ppErk;
  v52: -> Intperk; ppErk;  // modifiers: ppErk
  v53: -> Intpakt; pAkt;  // modifiers: pAkt
  v54: -> mTORa; kvpakt*pAkt*(mTORt - mTORa - TORC1 - TORC2);  // modifiers: pAkt, TORC2, TORC1, mTORt
  v55: -> mTORa; kvppErk*RSKa/(1 + kinrskc*RSKin)*(mTORt - mTORa - TORC1 - TORC2);  // modifiers: TORC2, TORC1, RSKa, mTORt
  v56: mTORa -> ; kdactm*mTORa;
  v57: mTORa -> TORC1; kst1/(1 + kinrapac*Rapamycin)*(mTORa - TORC1 - TORC2)*(Raptorc - TORC1);  // modifiers: TORC2, Raptorc
  v58: TORC1 -> mTORa; kdt1*TORC1;
  v59: TORC1 -> ; kdactm*TORC1;
  v6: phos2 -> ; Phosdeact*phos2;
  v60: mTORa -> TORC2; kst2*(mTORa - TORC2 - TORC1)*(Rictorc - TORC2);  // modifiers: Rictorc, TORC1
  v61: TORC2 -> ; kdactm*TORC2;
  v62: TORC2 -> mTORa; kdt2*TORC2;
  v63: -> RSKa; karsk/(1 + kinrskc*RSKin)*(RSKtc - RSKa)*ppErk;  // modifiers: ppErk, RSKtc
  v64: RSKa -> ; kdrsk*RSKa;
  v65: -> pS6; kas6t*TORC1*(S6tCFUE - pS6);  // modifiers: S6tCFUE, TORC1
  v66: -> pS6; kas6r*RSKa*(S6tCFUE - pS6);  // modifiers: S6tCFUE, RSKa
  v67: -> pS6; kbacks6*(S6tCFUE - pS6);  // modifiers: S6tCFUE
  v68: pS6 -> ; kdphoss6*pS6;
  v69: -> Proliferation; pck1correct*(pS6/max6c) + pcoffcorrect/60;  // modifiers: pS6
  v70: -> IntpS6; pS6;  // modifiers: pS6
end
