// SBML level 2 version 4

model BioModel1_repressor_activator_oscillations()

  // Compartments:
  compartment cell in PM = 4.18879 uM3;
  compartment EC = 8 uM3;
  compartment PM in EC = 12.56637 uM2;  // 2-D

  // Species:
  species mRNA_R in cell = 0;  // substance in molecules
  species A in cell = 0;  // substance in molecules
  species R in cell = 0;  // substance in molecules
  species PrmA in cell = KMOLE1*(1/cell);  // substance in molecules
  species PrmR in cell = KMOLE1*(1/cell);  // substance in molecules
  species C in cell = 0;  // substance in molecules
  species PrmA_bound in cell = 0;  // substance in molecules
  species PrmR_bound in cell = 0;  // substance in molecules
  species mRNA_A_ in cell = 0;  // substance in molecules

  // Parameters:
  common_delta_A = 1 s_1;
  KMOLE1 = 0.00166113 uM3;
  delta_A_C_decay has s_1;
  delta_A_A_decay has s_1;
  gamma_C_AR_binding has s_1_uM_1;
  alphaA_A_trnscr = 50 s_1;
  Kf_A_trnscr has s_1;
  alphaA_prmbound_active_A_trnscr = 500 s_1;
  Kf_active_A_trnscr has s_1;
  alphaR_R_trnsc = 0.01 s_1;
  Kf_R_trnsc has s_1;
  alphaR_prmbound_active_R_trnsc = 50 s_1;
  Kf_active_R_trnsc has s_1;
  gamma_A_PrmA_activation has s_1_uM_1;
  gamma_R_PrmR_activation has s_1_uM_1;
  betaR_R_trnsl = 5 s_1;
  Kf_R_trnsl has s_1;
  betaA_A_trnsl = 50 s_1;
  Kf_A_trnsl has s_1;

  // Assignment rules:
  delta_A_C_decay := common_delta_A;
  delta_A_A_decay := common_delta_A;
  gamma_C_AR_binding := 2*(1/KMOLE1);
  Kf_A_trnscr := alphaA_A_trnscr;
  Kf_active_A_trnscr := alphaA_prmbound_active_A_trnscr;
  Kf_R_trnsc := alphaR_R_trnsc;
  Kf_active_R_trnsc := alphaR_prmbound_active_R_trnsc;
  gamma_A_PrmA_activation := 1*(1/KMOLE1);
  gamma_R_PrmR_activation := 1*(1/KMOLE1);
  Kf_R_trnsl := betaR_R_trnsl;
  Kf_A_trnsl := betaA_A_trnsl;

  // Reactions:
  C_decay: C -> R; (delta_A_C_decay*C + (-(C_decay_Kr*R)))*cell;
    C_decay_Kr = 0 s_1;
  A_decay: A -> ; delta_A_A_decay*A*cell;
    A_decay_Kr = 0 uM_s_1;
  mRNA_A_decay: mRNA_A_ -> ; delta_MA*mRNA_A_*cell;
    delta_MA = 10 s_1; mRNA_A_decay_Kr = 0 uM_s_1;
  mRNA_R_decay: mRNA_R -> ; delta_MR*mRNA_R*cell;
    delta_MR = 0.5 s_1; mRNA_R_decay_Kr = 0 uM_s_1;
  AR_binding: A + R -> C; (R*gamma_C_AR_binding*A + (-(AR_binding_Kr*C)))*cell;
    AR_binding_Kr = 0 s_1;
  R_decay: R -> ; delta_R*R*cell;
    delta_R = 0.2 s_1; R_decay_Kr = 0 uM_s_1;
  A_trnscr: PrmA -> mRNA_A_ + PrmA; (Kf_A_trnscr*PrmA + (-(PrmA*A_trnscr_Kr*mRNA_A_)))*cell;
    A_trnscr_Kr = 0 s_1_uM_1;
  active_A_trnscr: PrmA_bound -> mRNA_A_ + PrmA_bound; (Kf_active_A_trnscr*PrmA_bound + (-(PrmA_bound*active_A_trnscr_Kr*mRNA_A_)))*cell;
    active_A_trnscr_Kr = 0 s_1_uM_1;
  R_trnsc: PrmR -> mRNA_R + PrmR; (Kf_R_trnsc*PrmR + (-(PrmR*R_trnsc_Kr*mRNA_R)))*cell;
    R_trnsc_Kr = 0 s_1_uM_1;
  active_R_trnsc: PrmR_bound -> mRNA_R + PrmR_bound; (Kf_active_R_trnsc*PrmR_bound + (-(PrmR_bound*active_R_trnsc_Kr*mRNA_R)))*cell;
    active_R_trnsc_Kr = 0 s_1_uM_1;
  PrmA_activation: PrmA + A -> PrmA_bound; (A*gamma_A_PrmA_activation*PrmA + (-(theta_A*PrmA_bound)))*cell;
    theta_A = 50 s_1;
  PrmR_activation: PrmR + A -> PrmR_bound; (A*gamma_R_PrmR_activation*PrmR + (-(theta_R*PrmR_bound)))*cell;
    theta_R = 100 s_1;
  R_trnsl: mRNA_R -> R + mRNA_R; (Kf_R_trnsl*mRNA_R + (-(mRNA_R*R_trnsl_Kr*R)))*cell;
    R_trnsl_Kr = 0 s_1_uM_1;
  A_trnsl: mRNA_A_ -> A + mRNA_A_; (Kf_A_trnsl*mRNA_A_ + (-(mRNA_A_*A_trnsl_Kr*A)))*cell;
    A_trnsl_Kr = 0 s_1_uM_1;

  // Unit definitions:
  unit substance = item;
  unit volume = (1e-6 metre)^3;
  unit area = (1e-6 metre)^2;
  unit length = 1e-6 metre;
  unit time = second;
  unit molecules = item;
  unit s_1 = 1 / second;
  unit uM3 = 1e-21 dimensionless * mole / item;
  unit uM2 = 1e-21 dimensionless * mole / item;
  unit uM_s_1 = 1e-3 dimensionless * mole / (metre^3 * second);
  unit s_1_uM_1 = 1000 dimensionless * metre^3 / (mole * second);
end
