// SBML level 2 version 1
// Created by JWS2SBML on 2008/05/26 09:12:19

model curien()

  // Compartments:
  compartment compartment = 1;

  // Species:
  species $Hser in compartment = 0;
  species Phser in compartment = 0;
  species $Cys in compartment = 15;
  species $Cystathionine in compartment = 0;
  species $Phi in compartment = 10000;
  species $Thr in compartment = 0;

  // Parameters:
  V1 = 1;
  kcat2 = 30;
  KmCYS = 460;
  KmPHSER = 2500;
  Ki2 = 2000;
  Ki3 = 1000;
  CGS = 0.7;
  TS = 5;
  AdoMet = 20;

  // Reactions:
  v1: $Hser -> Phser; V1;
  vCys: Phser + $Cys -> $Cystathionine + $Phi; CGS*(kcat2/(1 + KmCYS/Cys))*Phser/(Phser + KmPHSER*(1 + Phi/Ki2)/(1 + KmCYS/Cys));
  vThr: Phser -> $Thr + $Phi; TS*((0.42 + 3.5*AdoMet^2/73)/(1 + AdoMet^2/73))*Phser/((1 + Phi/Ki3)*(250*(1 + AdoMet/0.5)/(1 + AdoMet/1.09))/(1 + AdoMet^2/142) + Phser);
end
